#Interlayer bonded Bilayer Graphene with random isolated bonds + passivation by H

dimension 3
units metal
processors * 1 1
boundary p p p
neighbor 0.3 bin
neigh_modify every 1 delay 0 check yes
#define variables

variable T equal 300.0
variable V equal lx*ly*6.7  # 3.35 (1st layer) + gap (0) + 3.35 (2nd layer)
variable dt equal 0.0001
#define lattice

atom_style atomic
read_data gr60x5ab_20.00BD.data
#define interatomic potentials

pair_style			airebo 3 1 0
pair_coeff 			* * CH.airebo C C H
dump 1 all xyz 1000 bondnew.xyz
dump_modify 1 sort id
#define thermo variable settings

timestep ${dt}

#### BOND FORMATION ####

group atom1 id 	4587 1635 11905 3023 11715 413 27 1513 7249 4029 12325 47 7725 10263 12351 5343 12297 7175 4277 8133 8953 10621 9613 9557 5039 11015 1595 11921 11187 5951 5313 10763 8553 9939 9171 3953 3271 8233 1459 309 3613 3313 9287 1501 7207 1745 4723 1945 1621 9549 927 5375 4569 10813 3715 10181 10951 3383 1421 4337 5817 4031 8581 5197 6195 6285 5009 8253 1807 11643 5607 11941 8255 3857 329 8583 5847 6083 11911 11931 2811 9125 5087 4255 12157 7421 1695 5433 7961 9083 7115 3465 1905 6913 997 8843 2387 7969 5531 5451 1275 6489 12331 2627 9109 11063 11801 2277 949 10105 11283 3911 6623 1085 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

group atom2 id 	17082 14130 24316 15518 24210 12824 12522 13924 19660 16440 24736 12542 20136 22758 24846 17838 24708 19670 16688 20544 21364 23032 22024 21968 17534 23510 14090 24332 23682 18446 17724 23258 20964 22434 21666 16364 15766 20644 13954 12720 16024 15724 21782 13912 19702 14156 17218 14356 14032 21960 13422 17870 16980 23224 16210 22592 23446 15878 13832 16748 18228 16526 20992 17608 18690 18696 17420 20664 14302 24138 18102 24352 20750 16268 12740 21078 18342 18578 24406 24426 15306 21536 17582 16750 24568 19832 14190 17844 20372 21578 19610 15876 14316 19324 13408 21338 14882 20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

displace_atoms atom1 move 0 0 1.15 units box
displace_atoms atom2 move 0 0 -1.15 units box

# ======= grouping bonded and non-bonded atoms ======= #

group bonded union atom1 atom2
group nonbonded subtract all bonded

# ======= thermodynamics output setting ======= #

thermo_style    	custom step time temp press pxx pyy pzz pe ke etotal
thermo          	1000

# ======= minimization ======= #

min_style		cg
fix 			1 all box/relax x 0.0 y 0.0 z 0.0 couple xyz
minimize		0 1e-10 200000 400000
unfix			1

# ======= equilibration ======= #

fix 2 all recenter INIT INIT INIT

fix 1 nonbonded npt temp $T $T 0.1 x 0.0 0.0 1.0 y 0.0 0.0 1.0 couple xy
run 50000
unfix 1

fix 1 all npt temp $T $T 0.1 x 0.0 0.0 1.0 y 0.0 0.0 1.0 couple xy
run 50000
unfix 1
unfix 2

fix NVE all nve
fix				ts all temp/rescale 1 $T $T $(100.0*dt) 1.0
run 50000
unfix     ts
unfix     NVE

# ======= write output ======= #

write_data post_equil.data
