#Interlayer bonded Bilayer Graphene with random isolated bonds + passivation by H

dimension 3
units metal
processors * 1 1
boundary p p p
neighbor 0.3 bin
neigh_modify every 1 delay 0 check yes

# ======= define variables ======= #

variable T equal 300.0
variable V equal lx*ly*6.7  # 3.35 (1st layer) + gap (0) + 3.35 (2nd layer)
variable dt equal 0.0001

# ======= read data ======= #

atom_style atomic
read_data gr100x5aa_30.00BD.data

# ======= potential information ======= #

pair_style			airebo 3 1 0
pair_coeff 			* * CH.airebo C C H
dump 1 all xyz 1000 bondnew.xyz
dump_modify 1 sort id

# ======= time step ======= #

timestep ${dt}

# ======= bond formation ======= #

group atom1 id 	18453 6905 18017 13597 19479 11473 3665 11729 4787 10433 623 7021 13035 17121 19341 19481 15817 18913 9635 7455 4853 10111 9277 9199 13191 1809 17635 10727 4253 805 17835 17077 9559 16129 18627 2561 20279 3933 2343 415 16269 5771 9081 7891 1491 107 1009 4725 18585 19593 5963 17623 999 11285 749 6873 13475 19085 19927 3845 4357 9865 13415 2781 5959 7341 8379 10595 605 6395 9145 3815 6827 16957 5709 12027 9321 6307 9303 1483 15785 6575 8909 19257 17589 9001 3861 16577 10779 7413 7231 7445 13515 2833 7299 289 12843 12999 16461 15177 15427 4561 7073 14085 10877 15173 5097 18719 678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

group atom2 id 	39221 27673 38785 34365 40247 32241 24433 32497 25555 31201 21391 27789 33803 37889 40109 40249 36585 39681 30403 28223 25621 30879 30045 29967 33959 22577 38403 31495 25021 21573 38603 37845 30327 36897 39395 23329 41047 24701 23111 21183 37037 26539 29849 28659 22259 20875 21777 25493 39353 40361 26731 38391 21767 32053 21517 27641 34243 39853 40695 24613 25125 30633 34183 23549 26727 28109 29147 31363 21373 27163 29913 24583 27595 37725 26477 32795 30089 27075 30071 22251 36553 27343 29677 40025 38357 29769 24629 37345 31547 28181 27999 28213 34283 23601 28067 21057 33611 33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

displace_atoms atom1 move 0 0 1.15 units box
displace_atoms atom2 move 0 0 -1.15 units box

# ======= grouping bonded and non-bonded atoms ======= #

group bonded union atom1 atom2
group nonbonded subtract all bonded

# ======= thermodynamics output setting ======= #

thermo_style    	custom step time temp press pxx pyy pzz pe ke etotal
thermo          	1000

# ======= minimization ======= #

min_style		cg
fix 			1 all box/relax x 0.0 y 0.0 z 0.0 couple xyz
minimize		0 1e-10 200000 400000
unfix			1

# ======= equilibration ======= #

fix 2 all recenter INIT INIT INIT

fix 1 nonbonded npt temp $T $T 0.1 x 0.0 0.0 1.0 y 0.0 0.0 1.0 couple xy
run 50000
unfix 1

fix 1 all npt temp $T $T 0.1 x 0.0 0.0 1.0 y 0.0 0.0 1.0 couple xy
run 50000
unfix 1
unfix 2

fix NVE all nve
fix				ts all temp/rescale 1 $T $T $(100.0*dt) 1.0
run 50000
unfix     ts
unfix     NVE

# ======= write output ======= #

write_data post_equil.data
