#RD-IBG from 2D diamond (top-down)

dimension 3
units metal
processors * * 1
boundary p p p
neighbor 0.3 bin
neigh_modify every 1 delay 0 check yes

#define variables
variable T equal 300.0
variable V equal lx*ly*6.7  # 3.35 (1st layer) + gap (0) + 3.35 (2nd layer)
variable dt equal 0.0001

#lattice
atom_style atomic
read_data RDIBG_ab_2layers_10x10_40.00_BD.data

#define interatomic potentials
pair_style			airebo 3 1 0
pair_coeff 			* * CH.airebo C C H

dump equil all xyz 1000 equilibration.xyz
dump_modify equil sort id

#define thermo variable settings
timestep ${dt}

#### BOND FORMATION ####

group atom1 id 	3 7 15 19 23 27 31 35 39 43 47 55 59 63 67 71 75 79 83 87 99 103 107 111 115 119 127 131 135 143 147 151 155 163 171 173 175 179 181 183 185 187 189 191 195 197 199 203 205 209 211 213 215 217 219 221 223 225 227 229 231 233 235 237 239 241 243 245 247 249 251 253 255 257 261 263 267 269 271 273 275 277 281 283 285 287 289 291 293 295 301 305 307 309 311 319 321 323 325 327 329 331 333 339 341 343 347 349 351 353 355 357 359 361 363 365 367 369 373 375 377 379 381 383 385 387 389 393 395 397 399 401 403 405 411 413 415 421 423 425 429 431 433 435 437 441 443 445 447 449 453 455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

group atom2 id 	4034 4038 4046 4050 4054 4058 4062 4066 4070 4074 4078 4086 4090 4094 4098 4102 4106 4110 4114 4118 4130 4134 4138 4142 4146 4150 4158 4162 4166 4174 4178 4182 4186 4194 4202 4040 4206 4210 4048 4214 4052 4218 4056 4222 4226 4064 4230 4234 4072 4076 4242 4080 4246 4084 4250 4088 4254 4092 4258 4096 4262 4100 4266 4104 4270 4108 4274 4112 4278 4116 4282 4120 4286 4124 4128 4294 4298 4136 4302 4140 4306 4144 4148 4314 4152 4318 4156 4322 4160 4326 4168 4172 4338 4176 4342 4350 4188 4354 4192 4358 4196 4362 4200 4370 4208 4374 4378 4216 4382 4220 4386 4224 4390 4228 4394 4232 4398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

displace_atoms atom1 move 0 0 1.15 units box
displace_atoms atom2 move 0 0 -1.15 units box

run 2000

group bonded union atom1 atom2
group nonbonded subtract all bonded

thermo_style  custom step time temp press pxx pyy pzz pe ke etotal
thermo    1000

# ======= minimization =======

min_style cg
minimize  1e-10 1e-10 200000 400000

write_data post_mini.data

# ======= equilibration =======

fix 2 all recenter INIT INIT INIT

fix 1 nonbonded npt temp $T $T 0.1 x 0.0 0.0 1.0 y 0.0 0.0 1.0 couple xy
run 150000
unfix 1

fix 1 all npt temp $T $T 0.1 x 0.0 0.0 1.0 y 0.0 0.0 1.0 couple xy
run 200000
unfix 1
unfix 2

write_data post_equil.data
